// SBML level 2 version 4

model Model_1()
  // New Model

  // Compartments:
  compartment compartment_1 = 1;

  // Species:
  species X2D1 in compartment_1 = 1;
  species X3D1 in compartment_1 = 1;
  species $KuD1 in compartment_1;
  species X1D1 in compartment_1 = 1;
  species X1D2 in compartment_1 = 1;
  species X3D2 in compartment_1 = 1;
  species $MRND2 in compartment_1;
  species X1D3 in compartment_1 = 1;
  species X3D3 in compartment_1 = 1;
  species $MRND3 in compartment_1;
  species X1D4 in compartment_1 = 1;
  species X2D4 in compartment_1 = 1;
  species $KuD4 in compartment_1;
  species X1D5 in compartment_1 = 1;
  species X3D5 in compartment_1 = 1;
  species $MRND5 in compartment_1;
  species X1D6 in compartment_1 = 1;
  species X3D6 in compartment_1 = 1;
  species $MRND6 in compartment_1;
  species X1D7 in compartment_1 = 1;
  species X3D7 in compartment_1 = 1;
  species $MRND7 in compartment_1;
  species X1D8 in compartment_1 = 1;
  species X2D8 in compartment_1 = 1;
  species X3D8 in compartment_1 = 1;
  species $KuD8 in compartment_1;
  species $MRND8 in compartment_1;
  species $MRND1 in compartment_1;
  species MRND4 in compartment_1 = 1;
  species X3D4 in compartment_1 = 1;
  species KuD2 in compartment_1 = 1;
  species KuD3 in compartment_1 = 1;
  species X2D2 in compartment_1 = 1;
  species X2D3 in compartment_1 = 1;

  // Parameters:
  K1D1 = 0;
  Kl1D1 = 0;
  K2D1 = 0;
  Kl2D1 = 0;
  C1 = 0;
  C2 = 0;
  C3 = 0;
  C4 = 0;
  C5 = 0;
  C6 = 0;
  C7 = 0;
  C8 = 0;
  K2D4 = 0;
  K1D2 = 0;
  K2D2 = 0;
  Kl2D2 = 0;
  K1D3 = 0;
  K2D3 = 0;
  Kl2D3 = 0;
  K1D4 = 0;
  Kl1D4 = 0;
  K2D5 = 0;
  Kl2D5 = 0;
  K2D6 = 0;
  Kl2D6 = 0;
  K2D7 = 0;
  Kl2D7 = 0;
  K1D8 = 0;
  Kl1D8 = 0;
  K2D8 = 0;
  Kl2D8 = 0;
  h1 = 0;
  h2 = 0;
  h3 = 0;
  h4 = 0;

  // Assignment rules:
  KuD1 := C1 - X2D1;
  MRND2 := C2 - X3D2;
  MRND3 := C3 - X3D3;
  KuD4 := C4 - X2D4;
  MRND5 := C5 - X3D5;
  MRND6 := C6 - X3D6;
  MRND7 := C7 - X3D7;
  KuD8 := C8 - X2D8;
  MRND8 := C8 - X3D8;
  MRND1 := C1 - X3D1;

  // Reactions:
  r1: X1D1 + $KuD1 => X2D1; compartment_1*K1D1*X1D1*KuD1;
  r2: X2D1 => ; compartment_1*Kl1D1*X2D1;
  r4: X3D1 => ; compartment_1*Kl2D1*X3D1;
  r8: X1D2 + $MRND2 => X3D2; compartment_1*K2D2*X1D2*MRND2;
  r9: X3D2 => ; compartment_1*Kl2D2*X3D2;
  r13: X1D3 + $MRND3 => X3D3; compartment_1*K2D3*X1D3*MRND3;
  r14: X3D3 => ; compartment_1*Kl2D3*X3D3;
  r17: X1D4 + $KuD4 => X2D4; compartment_1*K1D4*X1D4*KuD4;
  r18: X2D4 => ; compartment_1*Kl1D4*X2D4;
  r22: X1D5 + $MRND5 => X3D5; compartment_1*K2D5*X1D5*MRND5;
  r23: X3D5 => ; compartment_1*Kl2D5*X3D5;
  r26: X1D6 + $MRND6 => X3D6; compartment_1*K2D6*X1D6*MRND6;
  r27: X3D6 => ; compartment_1*Kl2D6*X3D6;
  r29: X1D7 + $MRND7 => X3D7; compartment_1*K2D7*X1D7*MRND7;
  r30: X3D7 => ; compartment_1*Kl2D7*X3D7;
  r31: X1D8 + $KuD8 => X2D8; compartment_1*K1D8*X1D8*KuD8;
  r32: X2D8 => ; compartment_1*Kl1D8*X2D8;
  r33: X1D8 + $MRND8 => X3D8; compartment_1*K2D8*X1D8*MRND8;
  r3: X1D1 + $MRND1 => X3D1; compartment_1*K2D1*X1D1*MRND1;
  r34: X3D8 => ; compartment_1*Kl2D8*X3D8;
  r36: X1D2 + KuD2 => X2D2; compartment_1*K1D2*X1D2*KuD2;
  r37: X1D3 + KuD3 => X2D3; compartment_1*K1D3*X1D3*KuD3;
  r38: X1D4 + MRND4 => X3D4; compartment_1*K2D4*X1D4*MRND4;

  // Unit definitions:
  unit volume = 1e-3 litre;
  unit substance = 1e-3 mole;
end
